import Sofa

from SSD.SOFA.Rendering.UserAPI import UserAPI
from Caduceus import Caduceus

USE_GUI = True


def createScene(node):

    global USE_GUI

    # The script is launched with "runSofa"
    if USE_GUI:
        node.addObject(Caduceus(node, name='Controller'))

    # The script is launched with "python3" then create a Visualizer
    else:
        api = UserAPI(root=node, database_name='caduceus', remove_existing=True)
        node.addObject(Caduceus(node, factory=api, name='Controller'))
        return api


if __name__ == '__main__':

    USE_GUI = False

    # Init the scene graph and the Visualizer
    root = Sofa.Core.Node('root')
    factory = createScene(root)
    Sofa.Simulation.init(root)
    factory.launch_visualizer(offscreen=True)

    # Run a few steps of simulation and render them
    for _ in range(300):
        Sofa.Simulation.animate(root, root.dt.value)

    factory.close()
